*Heading
** Mesh Convergence Study — mesh size = 1.0 mm
** Mesh: 10x40 CPS4R elements (400 total)
** Nodes: 451
**
*Preprint, echo=NO, model=NO, history=NO, contact=NO
**
*Part, name=SPECIMEN
*Node
1, 0.000000, 0.000000
2, 1.000000, 0.000000
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**
*Element, type=CPS4R
1, 1, 2, 13, 12
2, 2, 3, 14, 13
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**
*Elset, elset=ALL_ELEMENTS, generate
1, 400, 1
**
*Nset, nset=SYM_X
1, 12, 23, 34, 45, 56
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*Nset, nset=SYM_Y
1, 2, 3, 4, 5, 6, 7, 8, 9, 10, 11
*Nset, nset=LOAD_NODES
441, 442, 443, 444, 445, 446, 447, 448, 449, 450, 451
*Nset, nset=CORNER
441
**
*Orientation, name=ORI_ROLL, system=RECTANGULAR
1.0, 0.0, 0.0, 0.0, 1.0, 0.0
1, 0.0
**
*Solid Section, elset=ALL_ELEMENTS, material=SGCC_STEEL, orientation=ORI_ROLL
1.5,
*End Part
**
*Assembly, name=Assembly
*Instance, name=SPECIMEN-1, part=SPECIMEN
*End Instance
**
*Nset, nset=SYM_X, instance=SPECIMEN-1
1, 12, 23, 34, 45, 56
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*Nset, nset=SYM_Y, instance=SPECIMEN-1
1, 2, 3, 4, 5, 6, 7, 8, 9, 10, 11
*Nset, nset=LOAD_NODES, instance=SPECIMEN-1
441, 442, 443, 444, 445, 446, 447, 448, 449, 450, 451
*Nset, nset=CORNER, instance=SPECIMEN-1
441
*End Assembly
**
*Material, name=SGCC_STEEL
*Density
7.85e-09,
*Elastic
200000.0, 0.3
**
*Plastic
312.3500, 0.000000
327.0277, 0.010204
339.8083, 0.020408
352.0307, 0.030612
363.7641, 0.040816
375.0331, 0.051020
385.8568, 0.061224
396.2530, 0.071429
406.2384, 0.081633
415.8294, 0.091837
425.0415, 0.102041
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602.5120, 0.500000
**
*Potential
1.0, 1.0119, 0.9347, 1.0041, 1.0, 1.0
**
*Step, name=Tensile, nlgeom=YES, inc=1000
*Static
0.01, 1.0, 1e-08, 0.02
**
*Boundary
SYM_X, 1, 1, 0.0
*Boundary
SYM_Y, 2, 2, 0.0
*Boundary
LOAD_NODES, 2, 2, 25.0
**
*Output, field, frequency=1
*Node Output
U, RF
*Element Output, directions=YES
S, E, PE, PEEQ
**
*Output, history, frequency=1
*Node Output, nset=CORNER
U2, RF2
**
*End Step
