*Heading
** Multi-direction optimization: yld2000_umat_90 (angle=90 deg)
*Preprint, echo=NO, model=NO, history=NO, contact=NO
**
*Part, name=SPECIMEN
*Node
1, 0.000000, 0.000000
2, 1.000000, 0.000000
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*Element, type=CPS4R
1, 1, 2, 13, 12
2, 2, 3, 14, 13
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*Elset, elset=ALL, generate
1, 400, 1
*Nset, nset=SYM_X
1, 12, 23, 34, 45, 56
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*Nset, nset=SYM_Y
1, 2, 3, 4, 5, 6, 7, 8, 9, 10, 11
*Nset, nset=LOAD
441, 442, 443, 444, 445, 446, 447, 448, 449, 450, 451
*Nset, nset=CORNER
441
*Orientation, name=ORI_ROLL, system=RECTANGULAR
1.000000, 0.000000, 0.0, -0.000000, 1.000000, 0.0
1, 0.0
*Solid Section, elset=ALL, material=MAT, orientation=ORI_ROLL
1.5,
*End Part
**
*Assembly, name=Assembly
*Instance, name=SPEC-1, part=SPECIMEN
*End Instance
*Nset, nset=SYM_X, instance=SPEC-1
1, 12, 23, 34, 45, 56
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*Nset, nset=SYM_Y, instance=SPEC-1
1, 2, 3, 4, 5, 6, 7, 8, 9, 10, 11
*Nset, nset=LOAD, instance=SPEC-1
441, 442, 443, 444, 445, 446, 447, 448, 449, 450, 451
*Nset, nset=CORNER, instance=SPEC-1
441
*End Assembly
**
*Material, name=MAT
*Density
7.85e-09,
*Depvar
1,
*User Material, constants=13
200000, 0.3, 326, 335.16, 3.95, 2.3900508, 1.9035549, 3.2039671
2.2182246, 2.6609165, 4.8115596, 0.40531292, 3.9285135
**
*Step, name=Tensile, nlgeom=YES, inc=1000
*Static
0.01, 1.0, 1e-08, 0.02
**
*Boundary
SYM_X, 1, 1, 0.0
*Boundary
SYM_Y, 2, 2, 0.0
*Boundary
LOAD, 2, 2, 25.0
**
*Output, field, frequency=1
*Node Output
U, RF
*Element Output, directions=YES
S, LE, PE, PEEQ
*Output, history, frequency=1
*Node Output, nset=CORNER
U2, RF2
*End Step
